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# 2. Ecranul MATHCAD
# Bara de meniuri, bara cu instrumente Standard, bara instrumentelor de formatare Formatting, bara instrumentelor matemarice Math.
# Paletele matematice: Calculator, Grafica, Vectori și matrice, Evaluarea expresiilor, derivarea și integrarea, operații logice, calcul simbolic, programare, alfabetul grecesc.
# 3. Regiune matematică: activare, mutare, formatare.
# 4 Regiune text: creare, formatare.
# 5.  Operatorul de definire locală, operatorul de evaluare, operatorul de definire globală. Calculul expresiilor aritmetice:
# n - numărul de ordine din registrul grupei
# De exemplu:
n := 12
2 + n = 14
2.1 + 3*n = 38.1
n! = 479001600
|-n| = 12
sqrt(n) = 3.4641
nthroot(n, 3) = 2.28943
n^3 = 1728
n^(1/3) = 2.28943
π = 3.14159
e = 2.71828
e + π + n = 17.8599
a + n = 13
a ≡ 1
b := 2
c := n
d := b + c
d = 14
((n + 1)^2 - (n/2)^(2/3))/(1/(n + 1)*nthroot(n, 3))*e^(n + 1) = 416257424
((n + 1)^2 - (n/2)^(2/3))/(1/(n + 1)*nthroot(n, 3))*e^(n + 1) = 416257424
n == 2 = 0
n == 5 = 0
n > n - 1 = 1
n > n + 1 = 0
n ≠ 1 = 1
n ≠ n = 0
# 6. Expresii algebrice:
a := n
b := 3
d := (a^2 + (a + b)^(2/3))/(a! + sqrt(a + b^2)) = 3.13323e-7
# 7. Functii predefinite in MATHCAD  (Insert-Function) (definire si calculul valorilor):
sin(n) = -0.536573
sin(n*deg) = 0.207912  # deg - grad!
tan(45 deg) = 1
acos(1) = 0
atan(1) = 0.785398
ln(e) = 1
log(10) = 1
log(25, 5) = 2
# 8. Definirea  functiilor in MATHCAD:
y(x) := x^2
y(1) = 1
y1(x) := n*x
y1(1) = 12
y1(n^2) = 1728
z(x) := x
f(x) := y(x) + y1(x)
f(1) = 13
f2(x, t) := x^n + sin(t) + y(x)
f2(1, 1) = 2.84147
# 9. Definirea variabilei-sir (este o progresie aritmetica):
x := -1, 2 .. 20
x = [-1; 2; 5; 8; 11; 14; 17; 20]  # .. - butonul m..n de pe paleta Matrix!! Aici ratia progresiei este 3.
y(x) = [1; 4; 25; 64; 121; 196; 289; 400]
# 10 De calculat expresiile, daca:
y := 3.1*π
x := -1.75*10^-3
|x|*(x + tan(y))/(50*x^2 + |sin(y)|)^(1/3) + (5*x^2 + |sin(y)|)^2.2/(x^2*(x + tan(y))^4) = 2260528
R_2 := cos(x)*sqrt(2*x + sin(y)^2)/(x + ln(|tan(y)|))^1.3 + (x + ln(|tan(y)|) + cos(y))/(2*x + sin(y)^2)^(1/3) = -4.75378 + 0.210314i
# 11. De calculat valorile functiei pe segmentul dat in N puncte la intervale egale unul de altul. Intervalul este de la -π la +π. numar de puncte N=7.
N := 7
# Cream sirul de valori al argumentului cu ratia:
r := 2*π/(N - 1) = 1.0472
x := -π, -π + r .. π
x = [-3.14159; -2.0944; -1.0472; 0; 1.0472; 2.0944; 3.14159]
# Definim functia:
y(x) := e^x*sin(x) + e^(-x)*cos(x)
# Calculam valorile functiei:
y(x) = [-23.1407; -4.16691; 1.12092; 1; 2.64333; 6.97101; -0.0432139]
# Concluzii:
# 1. MATHCAD este unul din  sistemele de automatizare a calculelor matematice, în care descrierea rezolvării problemei matematice se face așa cum se scrie pe hărtie.
# 2. Este accesibil savanților, inginerilor, studenților, elevilor. Se mai numește "supercalculator de buzunar"
# 3.Se remarcă prin simplitate și pretenții hard reduse.
# 4. În dependență de complexitatea problemelor se propun trei variante: Standard, Profesional, Premium.
