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# 1.Lucrul cu unități de măsură:
# Unitățile de măsură accesibile le putem vizualiza cu comanda Insert-Units.
n := 12  # n - numarul de ordine din registrul grupei
T := 5 s
V := 2*m/s
S := V*T = 10 m
F1 := 10 N
L := 2.5 m
A1 := F1*L = 25 J
A1 = 25 N*m
A1 = 254.929 kgf*cm
ρ := 7800*kg/m^3
V1 := 3 m^3
M := ρ*V1 = 23400 kg
T := M*V^2/2 = 46800 J
T = 46800 J
2 m + 20 cm + 30 mm = 2.23 m
2 m + 20 cm + 30 mm = 223 cm
p := 100 Pa
A1 := 200 cm^2
F1 := p*A1 = 2 N
F1 = 0.203943 kgf
ΔT := 12 °C
c := 12*J/(mol*(1 °C))
m1 := 3 mol
Q := m1*c*ΔT = 37.4445 J
G1 := 6.67*10^-11*N*m^2/kg^2
m1 := 12 kg
m2 := 1 kg
r := 1 m
F2 := G1*m1*m2/r^2 = 8.004e-10 N
C = 1 A*s
q_1 := 1 C
q_2 := 12 C
ε := 8.854*10^-12*F/m
r := 1 m
F3 := 1/(4*π*ε)*q_1*q_2/r^2 = 1.07853e11 N
# 2. Trasarea graficelor functiei de o singura variabila in coordonate carteziene ortogonale. Domeniul de definitie a functiilor [-π,3π]. Titlul graficelor: "graficul functiei". Denumirea axelor: "Axa x", "Axa y". De obtinut valori cu pasul 0.001.
f(x) := x^2*cos(x)
g(x) := (x^3*cos(x))
x := -π, -π + 0.001 .. 3*π
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# 3. De construit graficul functiei de doua variabile in coordonate carteziene ortogonale.
z(x1, y1) := sin(((x1 - 3*y1)*e^(-|y1|))^2)
# [component: inputs z]
# [component: inputs z]
# [component: inputs z]
# 4. Derivarea si integrarea functiilor.
# calcul simbolic
S(t) := t^2 + 3*sin(2*t)
d/dt(S(t)) → 2*t + 6*cos(2*t)
d^2/dt^2(S(t)) → 2 - 12*sin(2*t)
integral(S(t), t) → t^3/3 - 3*cos(2*t)/2
# calcul numeric
t := 0, 0.1 .. 10
S(t) := 12*t^2 + 3*sin(2*t)
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V(t) := d/dt(S(t))
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a(t) := d^2/dt^2(S(t))
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# 5. Rezolvarea unei ecuatii liniare sau neliniare de o singura variabila.
# de determinat radacina ecuatiei sin(z)=0 pe domeniul [1, 4]
# a ) cu functia "root":
r := root(sin(z), z, 1, 4)
r = 3.14159
# b) cu functia "given-find"
z := 2
Given
sin(z) == 0
r := Find(z)
r = 3.14159
# Concluzii:
# 1. Pot fi aplicate unitati de masura
# 2.Pot fi construite grafice plane si spatiale
# 3. Pot fi rezolvate ecuatii liniare si neliniare.
