# Minsterul Educatiei si Tineretului
#
# al Republicii Moldova
#
# Universitatea Tehnica a Moldovei
#
# Departamentul de Fizica
# RAPORT
# Lucrarea de laborator nr.3
# la mecanica teoretica
# Tema: Construirea graficelor plane si spatiale ale functiilor de o variabila si de doua varibile in MATHCAD.
# Construirea graficului traiectoriei punctului material in forma parametrica. Calculul vitezelor si acceleratiilor.
# A indeplinit st. gr. | Seremet Alexandru SI-212
# A verificat: | conf. V. Balan
# 1. De definit functia din tabel, conform numarului de ordine din registru. De trasat graficul acestei functii pe domeniul indicat. Pasul de calcul 0.05.
f(x) := 2*x*sin(6*π*x) + e^(2*x*cos(6*π*x))
x := 0, 0.05 .. 1
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# 2. De construit graficul traiectoriei miscarii punctului material in miscarea plana. De aratat pozitia pozitia punctului la un oarecare moment de timp t_1 din intervalul dat. De construit graficele de variatie a vitezei, acceleratiei tangentiale, acceleratiei normale si a razei de  curbura a  traiectoriei.
# Miscarea este definita in forma parametrica, in coordonate carteziene ortogonale.
x(t) := e^(t/s)*cos(t/s)*m
y(t) := 3*sin(cos(t/s))*m
t_1 := 0 s
t_2 := 3*π*s
x(t_1) = 1 m
y(t_1) = 2.52441 m
t := 0 s, 0.001 s .. t_2
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# Traiectoria miscarii:
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# Calculam vitezele:
V_x(t) := d/dt(x(t))
V_x(5 s) = 184.416 m/s
V_y(t) := d/dt(y(t))
V_y(5 s) = 2.76181 m/s
V(t) := sqrt(V_x(t)^2 + V_y(t)^2)
V(1 s) = 2.31444 m/s
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# Directia vitezei pentru momentul t_1 in sistemul de coordonate cartezian ortogonal:
# unghiul intre vectorul vitezei si axa x:
α_xv := acos(V_x(t_1)/V(t_1)) = 0 deg
# unghiul intre vectorul vitezei si axa y:
α_yv := acos(V_y(t_1)/V(t_1)) = 90 deg
# Drumul parcurs in intevalul de 5sec:
S(t) := integral(V(t), t = 0 s .. t)
S(5 s) = 117859 mm
# Acceleratiile in sistemul de coordonate cartezian ortogonal:
a_x(t) := d/dt(V_x(t))
a_x(t_1) = 0 m/s^2
a_y(t) := d/dt(V_y(t))
a_y(t_1) = -1.62091 m/s^2
a(t) := sqrt(a_x(t)^2 + a_y(t)^2)
a(t_1) = 1.62091 m/s^2
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# Directia acceleratiei pentru momentul t_1 in sistemul de coordonate cartezian ortogonal:
# unghiul intre vectorul acceleratiei si axa x:
α_xa := acos(a_x(t_1)/a(t_1)) = 90 deg
# unghiul intre vectorul acceleratiei si axa y:
α_ya := acos(V_y(t_1)/V(t_1)) = 90 deg
# Aceleratia tangentiala:
a_τ(t) := d/dt(V(t))
a_τ(t_1) = 0 m/s^2
# Raza de curbura a traiectoriei:
ρ(t) := V(t)^2/sqrt(a(t)^2 - a_τ(t)^2)
ρ(t_1) = 616.939 mm
# Aceleratia normala:
a_n(t) := V(t)^2/ρ(t)
a_n(t_1) = 1.62091 m/s^2
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ρ(t_1) = 0.616939 m
t := 0.1 s, 0.15 s .. t3s  # error: This variable is undefined.
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# 2. De construit graficul traiectoriei miscarii punctului material in miscarea spatiala. De aratat pozitia pozitia punctului la un oarecare moment de timp t_1 din intervalul dat. De calculat viteza, acceleratia tangentiala, acceleratiei normala, acceleratia totala in momentul t_1
# Miscarea este definita in forma parametrica, in coordonate carteziene ortogonale.
x1(t) := 2*cos(sin(t))
y1(t) := 3*sin(t - 1)
z1(t) := t
F := CreateSpace(x1, y1, z1, 40)
# [component: inputs F]
# 3. De calculat viteza, acceleratia tangentiala, acceleratiei normala, acceleratia totala in momentul t_1
# Miscarea este definita in forma parametrica, in coordonate carteziene ortogonale.
# Aici este comod de a trece la forma vectoriala de analiza a miscarii.
# Raza-vectoarea a pzitiei punctului material in functie de timp:
ORIGIN := 1
R(t) := [x1(t); y1(t); z1(t)]*m
R(t_1/s) = [2; -2.52441; 0] m
R(t_1/s)[1] = 2 m
# Modulul razei vectoare pentru momentul t_1:
|R(t_1/s)| = 3.22066 m
# Viteza punctului in functie de timp:
V(t) := [d/dt(x1(t)); d/dt(y1(t)); d/dt(z1(t))]*m/s
V(t_1/s) = [0; 1.62091; 1] m/s
# Modulul vitezei in functie de timp:
mV(t) := |V(t)|
mV(t_1/s) = 1.90456 m/s
# Acceleratia tangentiala in functie de timp:
a_τ(t) := d/dt(|V(t)/s|)
a_τ(t_1/s) = 2.14845 m/s^2
aa(t) := a_τ(t)^2
aa(t_1/s) = 4.61582 m^2/s^4
# Acceleratia punctului in functie de timp:
a(t) := [d^2/dt^2(x1(t)); d^2/dt^2(y1(t)); d^2/dt^2(z1(t))]*m/s^2
a(t_1/s) = [-2; 2.52441; 0] m/s^2
# Acceleratia pentru momentul t_1:
|a(t_1/s)| = 3.22066 m/s^2
# Raza de curbura a traiectoriei in functie de timp:
ρ(t) := |V(t)|^2/sqrt(|a(t)|^2 - a_τ(t)^2)
ρ(t_1/s) = 1.51181 m
# Aceleratia normala:
a_n(t) := |V(t)|^2/ρ(t)
a_n(t_1/s) = 2.39934 m/s^2
# Concluzii:
# Sunt calculati parametrii geometrici si cinematici ai miscarii punctului material in miscarea plana si spatiala.
