# Minsterul Educatiei si Tineretului
#
# al Republicii Moldova
#
# Universitatea Tehnica a Moldovei
#
# Departamentul de Fizica
# RAPORT
# Lucrarea de laborator nr.4
# la mecanica teoretica
# Tema: Compunerea oscilatiilor armonice.
# Varianta 12
# Seremet Alexandru SI-212
# A indeplinit st. gr.
# A verificat: | conf. V. Balan
# 1. Caracteristicile cinematice ale proceselor oscilatorii.
x(t) := A*sin(ω*t + φ_0)  # disabled  # sau
x(t) := A*cos(ω*t + φ_0)  # disabled  # x - elongatie.
# Daca A,ω,φ sunt constante, oscilatia se numeste armonica. Daca, cel putin una din marimile A,ω,φ depinde de timp, oscilatia este nearmonica.
# A - amplitudine, ω - pulsatie, φ_0 - fază initila, sau fază.
T := 2*π/ω  # disabled  # -perioada oscilatiei.
# 2. Compunerea oscilatiilor armonice de aceiasi directie.
x_1(t) := A_1*cos(ω_1*t + α_1)  # disabled
x_2(t) := A_2*cos(ω_2*t + α_2)  # disabled
# Suma a doua oscilatii armonice de aceeasi directie este:
x(t) := A(t)*cos((ω_2 - ω_1)*t + (α_2 - α_1))  # disabled  # nu este armonica, daca ω_1 ≠ ω_2!!
# "Amplitudinea"
A(t) := sqrt(A_1^2 + A_2^2 + 2*A_1*A_2*cos((ω_2 - ω_1)*t + (α_2 - α_1)))  # disabled
# 3.  Compunerea oscilaţiilor armonice de direcţii reciproc perpendiculare
# 4. Doua oscilatii armonice de aceeasi directie:
n := 12
# Amplitudinea oscilatiilor:
A_1 := n*cm = 12 cm
A_2 := n*cm = 12 cm
# Pulsatiile oscilatiilor:
ω_1 := n/5*rad/sec = 2.4 1/s
ω_2 := n*1/s + 7*1/s = 19 1/s
# Faze initiale ale oscilatiilor:
α_1 := 0 deg
α_2 := 0 deg
# Elongatiile oscilatiilor in functie de timp:
x_1(t) := A_1*cos(ω_1*t + α_1)
x_2(t) := A_2*cos(ω_2*t + α_2)
# Suma a doua oscilatii armonice, in caz general nu mai este armonica!!
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# fie :
ω_1 := n*rad/sec = 12 1/s
ω_2 := n*1/s + 0.5*n*1/s = 18 1/s
A_1 = 0.12 m
A_2 = 0.12 m
x_1(t) := A_1*cos(ω_1*t + α_1)
x_2(t) := A_2*cos(ω_2*t + α_2)
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# Acum un caz caz deosebit al sumei oscilatiilor armonice de aceasi directie:
# ambele oscilatii au pulsatii apropiate ca valoare. In acest caz are loc fenomenul numit "batai" in  mecanica si modulatia oscilatiilor in radiotehnica..
# fie :
ω_1 := n*rad/sec = 12 1/s
ω_2 := n*1/s + 0.1*n*1/s = 13.2 1/s
n := 12
A_1 := n*cm = 12 cm
A_2 := n*cm = 12 cm
x_1(t) := A_1*cos(ω_1*t + α_1)
x_2(t) := A_2*cos(ω_2*t + α_2)
# "Amplitudinea" oscilatiei rezultante:
A(t) := sqrt(A_1^2 + A_2^2 + 2*A_1*A_2*cos((ω_2 - ω_1)*t + (α_2 - α_1)))
# Perioada "batailor":
T := 2*π/|ω_2 - ω_1| = 5.23599 s
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# Perioada "batailor":
T := 2*π/|ω_2 - ω_1| = 5.23599 s
# fie :
ω_1 := 2*n*rad/sec = 24 1/s
ω_2 := 2*n*1/s + 0.1*n*1/s = 25.2 1/s
A_1 := n*cm = 12 cm
A_2 := n/3*cm = 4 cm
x_1(t) := A_1*cos(ω_1*t + α_1)
x_2(t) := A_2*cos(ω_2*t + α_2)
A(t) := sqrt(A_1^2 + A_2^2 + 2*A_1*A_2*cos((ω_2 - ω_1)*t + (α_2 - α_1)))
# Perioada modulatiilor:
T := 2*π/|ω_2 - ω_1| = 5.23599 s
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# 4. Suma a doua oscilatii armonice perpendiculare intre ele
n := 12
# a) de aceeasi frecventa:
# Amplitudinea oscilatiilor:
A_x := n*cm = 12 cm
A_y := 2*n*cm = 24 cm
# Pulsatiile oscilatiilor:
ω_x := n*rad/sec = 12 1/s
ω_y := n*1/s = 12 1/s
# Diferenta fazelor initiale ale oscilatiilor, Δα:
# Elongatiile oscilatiilor in functie de timp:
x(t) := A_x*cos(ω_x*t)
y(t, Δα) := A_y*cos(ω_x*t + Δα)
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# a) frecvente diferite: | Figuri Lissajous!
# Amplitudinea oscilatiilor:
A_x := n*cm = 12 cm
A_y := 1.5*n*cm = 18 cm
# Pulsatia  oscilatiei in directia axe x:
ω_x := n*rad/sec = 12 1/s
# raportul pulsatiilor - β
# Pulsatia  oscilatiei in directia axe y:
ω_y(β) := β*ω_x
ω_y(0.5) = 6 1/s
# Diferenta fazelor initiale ale oscilatiilor, Δα:
# Elongatiile oscilatiilor in functie de timp:
x(t) := A_x*cos(ω_x*t)
y(t, Δα, β) := A_y*cos(ω_y(β)*t + Δα)
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t := 0 s, 0.01 s .. 10 s
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# Concluzii:
# 1. Deosebim "adunari" ale oscilatiilor  de aceeasi directie, si "adunari" ale oscilatiilor de directii perpendiculare.
# 2. La adunari ale oscilatiilor armonice de aceeasi directie cu pulsatii apropiate are loc fenomenul de "batai" si fenomenul de "modulare" a oscilatiilor.
# 3. La adunari ale oscilatiilor armonice cu directii perpendiculare, caracterul sumei depinde de raportul pulsatiilor si de diferenta de faze initiale.
# 4. Daca raportul frecventelor este numar irational, traiectoria sumei trece prin toate punctele dreptunghiului marginit de amplitudinile initiale, daca timpul este nemarginit!
